# OpenSim document version 30000
Model:
  length_units: meters
  force_units: N
  gravity: 0 -9.80665 0
  credits:
    Frank Anderson, Peter Loan, Ayman Habib, Ajay Seth, Michael Sherman
  BodySet:
    Body ground: mass=0 mass_center=(0 0 0) inertia_xx=1 inertia_yy=1 inertia_zz=1
    Body humerus: mass=1 mass_center=(0 0 0) inertia_xx=0 inertia_yy=0 inertia_zz=0
      PinJoint shoulder: parent_body=ground location_in_parent=(0 0 0) location=(-1 0 0)
        Coordinate shoulder_coord_0: motion_type=rotational
    Body radius: mass=1 mass_center=(0 0 0) inertia_xx=0 inertia_yy=0 inertia_zz=0
      PinJoint elbow: parent_body=humerus location_in_parent=(0 0 0) location=(-1 0 0)
        Coordinate elbow_coord_0: motion_type=rotational
  ForceSet:
    PathActuator muscle1L:
      MovingPathPoint point1: ground (0 0 0) x_coordinate=shoulder_coord_0 y_coordinate=shoulder_coord_0
          z_coordinate=shoulder_coord_0 z_location=Constant(value=0)
        x_location: Sine: amplitude=0.1 omega=1 [radians/sec] phase=3.141593
        y_location: Sine: amplitude=0.1 omega=1 phase=1.570796
      PathPoint point2: humerus (-0.3 0 0)
    PathActuator muscle1R:
      MovingPathPoint point1: ground (0 0 0) x_coordinate=shoulder_coord_0 y_coordinate=shoulder_coord_0
          z_coordinate=shoulder_coord_0 z_location=Constant(value=0)
        x_location: Sine: amplitude=-0.1 omega=1 phase=3.141593
        y_location: Sine: amplitude=-0.1 omega=1 phase=1.570796
      PathPoint point2: humerus (-0.3 0 0)
    CoordinateActuator: coordinate=shoulder_coord_0
    CoordinateActuator: coordinate=elbow_coord_0
